<neuroml xmlns="http://www.neuroml.org/schema/neuroml2"  xmlns:xs="http://www.w3.org/2001/XMLSchema" xmlns:xsi="http://www.w3.org/2001/XMLSchema-instance" xsi:schemaLocation="http://www.neuroml.org/schema/neuroml2 https://raw.github.com/NeuroML/NeuroML2/development/Schemas/NeuroML2/NeuroML_v2.3.1.xsd" id="ConnectionsTest">
    <notes>
    This NeuroML 2 file has been generated from:
        PyNN v0.11.0
        libNeuroML v0.6.8
        pyNeuroML v1.3.22
    </notes>
    <IF_cond_alpha id="IF_cond_alpha_pop_pre" cm="1.0" i_offset="0.9" tau_syn_E="2.0" tau_syn_I="5.0" v_init="-65.0" tau_m="20.0" tau_refrac="5.0" v_reset="-65.0" v_rest="-65.0" v_thresh="-50.0" e_rev_E="0.0" e_rev_I="-70.0"/>
    <IF_cond_alpha id="IF_cond_alpha_pop_post" cm="1.0" i_offset="0.9" tau_syn_E="2.0" tau_syn_I="5.0" v_init="-65.0" tau_m="20.0" tau_refrac="5.0" v_reset="-65.0" v_rest="-65.0" v_thresh="-50.0" e_rev_E="0.0" e_rev_I="-70.0"/>
    <alphaCondSynapse id="syn__pop_pre__TO__pop_post" tau_syn="2.0" e_rev="0.0"/>
    <alphaCondSynapse id="syn__AllToAllConnectorProj" tau_syn="2.0" e_rev="0.0"/>
    <alphaCondSynapse id="syn__OneToOneConnector" tau_syn="2.0" e_rev="0.0"/>
    <alphaCondSynapse id="syn__FixedProbabilityConnector" tau_syn="2.0" e_rev="0.0"/>
    <alphaCondSynapse id="syn__AllToAllConnectorProjSelection" tau_syn="2.0" e_rev="0.0"/>
    <network id="ConnectionsTest">
        <population id="pop_pre" component="IF_cond_alpha_pop_pre" size="5" type="populationList">
            <property tag="radius" value="5"/>
            <instance id="0">
                <location x="-42.699924151852066" y="4.729036955047805" z="-9.873618042704768"/>
            </instance>
            <instance id="1">
                <location x="78.938113344951091" y="26.315870763800774" z="-35.038791824720562"/>
            </instance>
            <instance id="2">
                <location x="27.794170010388306" y="-7.853030988231846" z="-94.727877190272736"/>
            </instance>
            <instance id="3">
                <location x="-39.634051807222725" y="-35.968340524988939" z="-26.74170281006225"/>
            </instance>
            <instance id="4">
                <location x="-9.410736121125884" y="26.358765985691068" z="-75.199647589865521"/>
            </instance>
        </population>
        <population id="pop_post" component="IF_cond_alpha_pop_post" size="5" type="populationList">
            <property tag="radius" value="5"/>
            <instance id="0">
                <location x="-30.217914865204222" y="179.402262884693499" z="-41.905807576937626"/>
            </instance>
            <instance id="1">
                <location x="13.540511756095786" y="278.225681490259603" z="22.329670872029219"/>
            </instance>
            <instance id="2">
                <location x="21.400564508691922" y="249.419490876899118" z="39.145972615350487"/>
            </instance>
            <instance id="3">
                <location x="-23.828897288424212" y="172.144757981330031" z="-69.797540774751937"/>
            </instance>
            <instance id="4">
                <location x="44.702013145387063" y="200.054255688881625" z="-55.904848619413471"/>
            </instance>
        </population>
        <projection id="pop_pre__TO__pop_post" presynapticPopulation="pop_pre" postsynapticPopulation="pop_post" synapse="syn__pop_pre__TO__pop_post">
            <connectionWD id="0" preCellId="../pop_pre/0/IF_cond_alpha_pop_pre" postCellId="../pop_post/0/IF_cond_alpha_pop_post" weight="0.01" delay="10.0ms"/>
            <connectionWD id="1" preCellId="../pop_pre/1/IF_cond_alpha_pop_pre" postCellId="../pop_post/0/IF_cond_alpha_pop_post" weight="0.01" delay="10.0ms"/>
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        </projection>
        <projection id="AllToAllConnectorProj" presynapticPopulation="pop_pre" postsynapticPopulation="pop_post" synapse="syn__AllToAllConnectorProj">
            <connectionWD id="0" preCellId="../pop_pre/0/IF_cond_alpha_pop_pre" postCellId="../pop_post/0/IF_cond_alpha_pop_post" weight="0.05" delay="5.0ms"/>
            <connectionWD id="1" preCellId="../pop_pre/1/IF_cond_alpha_pop_pre" postCellId="../pop_post/0/IF_cond_alpha_pop_post" weight="0.05" delay="5.0ms"/>
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        </projection>
        <projection id="OneToOneConnector" presynapticPopulation="pop_pre" postsynapticPopulation="pop_post" synapse="syn__OneToOneConnector">
            <connectionWD id="0" preCellId="../pop_pre/0/IF_cond_alpha_pop_pre" postCellId="../pop_post/0/IF_cond_alpha_pop_post" weight="0.02" delay="4.0ms"/>
            <connectionWD id="1" preCellId="../pop_pre/1/IF_cond_alpha_pop_pre" postCellId="../pop_post/1/IF_cond_alpha_pop_post" weight="0.02" delay="4.0ms"/>
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        </projection>
        <projection id="FixedProbabilityConnector" presynapticPopulation="pop_pre" postsynapticPopulation="pop_post" synapse="syn__FixedProbabilityConnector">
            <connectionWD id="0" preCellId="../pop_pre/0/IF_cond_alpha_pop_pre" postCellId="../pop_post/1/IF_cond_alpha_pop_post" weight="0.1" delay="1.0ms"/>
            <connectionWD id="1" preCellId="../pop_pre/3/IF_cond_alpha_pop_pre" postCellId="../pop_post/1/IF_cond_alpha_pop_post" weight="0.1" delay="1.0ms"/>
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        </projection>
        <projection id="AllToAllConnectorProjSelection" presynapticPopulation="pop_pre" postsynapticPopulation="pop_post" synapse="syn__AllToAllConnectorProjSelection">
            <connectionWD id="0" preCellId="../pop_pre/1/IF_cond_alpha_pop_pre" postCellId="../pop_post/0/IF_cond_alpha_pop_post" weight="0.05" delay="5.0ms"/>
            <connectionWD id="1" preCellId="../pop_pre/3/IF_cond_alpha_pop_pre" postCellId="../pop_post/0/IF_cond_alpha_pop_post" weight="0.05" delay="5.0ms"/>
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        </projection>
    </network>
</neuroml>
